zo 16 mrt 2025 13:48:55 CET
$PROB   DEX model
$INPUT ID DID TIME DV DVTY AMT RATE EVID AGE WGT HGT M1F2 S1N2 GRP BMI SESS O1P2
$DATA "data.csv" IGNORE=@
$SUBROUTINES ADVAN11 TRANS4
$PK
    VSIZ=(WGT/70)
    CSIZ=(WGT/70)**0.75
	SES1=(2-SESS)
	SES2=(SESS-1)
    V1 =EXP(THETA(1)+ETA(1) + SES1*ETA(2) + SES2*ETA(3)) * VSIZ
    V2 =EXP(THETA(2)       ) * VSIZ
    V3 =EXP(THETA(3)+ETA(4)) * VSIZ
    CL =EXP(THETA(4)+ETA(5)) * CSIZ
    RV2=EXP(THETA(2))
    Q2 =EXP(THETA(5)) * ((V2/RV2)**0.75)
    RV3=EXP(THETA(3))
    Q3 =EXP(THETA(6)) * ((V3/RV3)**0.75)
    S1 =V1
$THETA
	( -2, 6.046010e-01, 3)
	( 1, 3.326570e+00, 5)
	( 3, 3.997030e+00, 7)
	( -2, -3.641990e-01, 1)
	( -2, 1.178030e+00, 4)
	( -2, -3.720650e-01, 2)
$OMEGA 0.1
$OMEGA BLOCK(1) 0.1
$OMEGA BLOCK SAME
$OMEGA 0.1 0.1
$SIGMA
    (0.1)
$ERROR
    IPRED=A(1)/V1
    Y=IPRED + IPRED*ERR(1)
$ESTM SIG=6 MAX=5000    METHOD=1 INTERACT SORT NOABORT POSTHOC PRINT=1
$TABLE ID TIME DVTY EVID IPRED DV PRED RES CWRES
     NOPRINT ONEHEADER NOAPPEND WRESCHOL FILE="dex.pred.txt"
$TABLE ID  V1 V2 V3 CL Q2 Q3 AGE WGT HGT M1F2
     NOPRINT ONEHEADER NOAPPEND FIRSTONLY FILE="dex.posthoc.txt"

NM-TRAN MESSAGES
 WARNINGS AND ERRORS (IF ANY) FOR PROBLEM    1
 (WARNING  2) NM-TRAN INFERS THAT THE DATA ARE POPULATION.
 (WARNING  97) A RANDOM QUANTITY IS RAISED TO A POWER. IF THE RESULT AFFECTS
 THE VALUE OF THE OBJECTIVE FUNCTION, THE USER SHOULD ENSURE THAT THE
 RANDOM QUANTITY IS NEVER 0 WHEN THE POWER IS < 1.
Note: Analytical 2nd Derivatives are constructed in FSUBS but are never used.
      You may insert $ABBR DERIV2=NO after the first $PROB to save FSUBS construction and compilation time

1NONLINEAR MIXED EFFECTS MODEL PROGRAM (NONMEM) VERSION 7.5.1
 ORIGINALLY DEVELOPED BY STUART BEAL, LEWIS SHEINER, AND ALISON BOECKMANN
 CURRENT DEVELOPERS ARE ROBERT BAUER, ICON DEVELOPMENT SOLUTIONS,
 AND ALISON BOECKMANN. IMPLEMENTATION, EFFICIENCY, AND STANDARDIZATION
 PERFORMED BY NOUS INFOSYSTEMS.
 PROBLEM NO.:         1
 DEX model
 TOT. NO. OF OBS RECS:      379
 TOT. NO. OF INDIVIDUALS:       18
 THREE COMPARTMENT MODEL (ADVAN11)
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 #TBLN:      1
 #METH: First Order Conditional Estimation with Interaction
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
 #TERM:
0MINIMIZATION TERMINATED
 DUE TO ROUNDING ERRORS (ERROR=134)
 NO. OF FUNCTION EVALUATIONS USED:      400
 NO. OF SIG. DIGITS IN FINAL EST.:  6.0

 ETABAR IS THE ARITHMETIC MEAN OF THE ETA-ESTIMATES,
 AND THE P-VALUE IS GIVEN FOR THE NULL HYPOTHESIS THAT THE TRUE MEAN IS 0.

 ETABAR:         7.5265E-03  1.7134E-02  4.1749E-02 -1.9116E-03  1.9883E-03
 SE:             1.3027E-02  8.4253E-02  6.4504E-02  5.1285E-02  3.7668E-02
 N:                      18          18          18          18          18

 P VAL.:         5.6343E-01  8.3885E-01  5.1748E-01  9.7027E-01  9.5790E-01

 ETASHRINKSD(%)  7.0439E+01  3.1648E+01  4.7669E+01  1.3516E+01  3.8278E+00
 ETASHRINKVR(%)  9.1262E+01  5.3280E+01  7.2615E+01  2.5206E+01  7.5091E+00
 EBVSHRINKSD(%)  6.5831E+01  2.4366E+01  3.5477E+01  1.3630E+01  3.5554E+00
 EBVSHRINKVR(%)  8.8325E+01  4.2795E+01  5.8368E+01  2.5402E+01  6.9844E+00
 RELATIVEINF(%)  0.0000E+00  0.0000E+00  0.0000E+00  7.4448E+01  9.2958E+01
 EPSSHRINKSD(%)  5.6948E+00
 EPSSHRINKVR(%)  1.1065E+01


 TOTAL DATA POINTS NORMALLY DISTRIBUTED (N):          379
 N*LOG(2PI) CONSTANT TO OBJECTIVE FUNCTION:    696.55540816914186
 OBJECTIVE FUNCTION VALUE WITHOUT CONSTANT:   -670.59022485123239
 OBJECTIVE FUNCTION VALUE WITH CONSTANT:       25.965183317909464
 REPORTED OBJECTIVE FUNCTION DOES NOT CONTAIN CONSTANT

 TOTAL EFFECTIVE ETAS (NIND*NETA):                            88


 #TERE:
 Elapsed estimation  time in seconds:   158.63
 Elapsed postprocess time in seconds:     1.86

 ********************               FIRST ORDER CONDITIONAL ESTIMATION WITH INTERACTION              ********************
 #OBJT:**************                       MINIMUM VALUE OF OBJECTIVE FUNCTION                      ********************
 #OBJV:********************************************     -670.590       **************************************************

 ********************               FIRST ORDER CONDITIONAL ESTIMATION WITH INTERACTION              ********************
 ********************                             FINAL PARAMETER ESTIMATE                           ********************

 THETA - VECTOR OF FIXED EFFECTS PARAMETERS   *********
         TH 1      TH 2      TH 3      TH 4      TH 5      TH 6
         5.77E-01  3.41E+00  3.95E+00 -3.76E-01  1.09E+00 -5.05E-01

 OMEGA - COV MATRIX FOR RANDOM EFFECTS - ETAS  ********
         ETA1      ETA2      ETA3      ETA4      ETA5
 ETA1
+        3.50E-02
 ETA2
+        0.00E+00  2.73E-01
 ETA3
+        0.00E+00  0.00E+00  2.73E-01
 ETA4
+        0.00E+00  0.00E+00  0.00E+00  6.33E-02
 ETA5
+        0.00E+00  0.00E+00  0.00E+00  0.00E+00  2.76E-02

 SIGMA - COV MATRIX FOR RANDOM EFFECTS - EPSILONS  ****
         EPS1
 EPS1
+        3.63E-02

 OMEGA - CORR MATRIX FOR RANDOM EFFECTS - ETAS  *******
         ETA1      ETA2      ETA3      ETA4      ETA5
 ETA1
+        1.87E-01
 ETA2
+        0.00E+00  5.23E-01
 ETA3
+        0.00E+00  0.00E+00  5.23E-01
 ETA4
+        0.00E+00  0.00E+00  0.00E+00  2.52E-01
 ETA5
+        0.00E+00  0.00E+00  0.00E+00  0.00E+00  1.66E-01

 SIGMA - CORR MATRIX FOR RANDOM EFFECTS - EPSILONS  ***
         EPS1
 EPS1
+        1.90E-01
 Elapsed finaloutput time in seconds:     0.29
 #CPUT: Total CPU Time in Seconds,      501.778
