do  2 jul 2026 23:00:24 CEST
$PROB Schnider
$INPUT ID,TIME,DV,AMT,RATE,EVID,AGE,WT,HT,M1F2,A1V2
$DATA "data.csv" IGNORE=@
$SUBROUTINES ADVAN13 TOL=9
$MODEL
COMPARTMENT=(CENTRAL     DEFDOSE DEFOBS)
COMPARTMENT=(PERIPH1)
COMPARTMENT=(PERIPH2)
$PK
SIZE = WT/70.;
MU_V1 = LOG(THETA(1)) + LOG(SIZE)
V1 = EXP(MU_V1 + ETA(1))
MU_V2 = LOG(THETA(2)) + LOG(SIZE)
V2 = EXP(MU_V2 + ETA(2))
MU_V3 = LOG(THETA(3)) + LOG(SIZE)
V3 = EXP(MU_V3 + ETA(3))
MU_CL = LOG(THETA(4)) + 0.75*LOG(SIZE)
CL = EXP(MU_CL + ETA(4))
MU_Q2 = LOG(THETA(5)) + 0.75*LOG(SIZE)
Q2 = EXP(MU_Q2 + ETA(5))
MU_Q3 = LOG(THETA(6)) + 0.75*LOG(SIZE)
Q3 = EXP(MU_Q3 + ETA(6))
SDPROP=THETA(7)
SDADD=THETA(8)
S1=V1
K10 = CL/V1
K12 = Q2/V1
K21 = Q2/V2
K13 = Q3/V1
K31 = Q3/V3
$DES
DADT(1) = -(K10+K12+K13)*A(1) + K21*A(2) + K31*A(3)
DADT(2) =  K12*A(1) - K21*A(2)
DADT(3) =  K13*A(1) - K31*A(3)
$THETA
(0.1, 6, 25)
(1, 20, 125)
(25, 200, 500)
(0.1,  2, 6)
(0.1, 1, 3)
(0.1, 1, 3)
(0.1, 0.22, 1)
(1e-5 FIXED)
$OMEGA
0.1
0.1
0 FIXED
0.1
0 FIXED
0 FIXED
$SIGMA 1 FIXED
$ERROR(ONLY OBSERVATIONS)
	IPRED=A(1)/V1
	W = SQRT((IPRED * SDPROP)**2 + SDADD**2)
	Y = IPRED + W*ERR(1)
$ESTM SIG=3 MAX=5000 METHOD=COND LAPLACE INTERACT NOABORT POSTHOC PRINT=1

NM-TRAN MESSAGES
 WARNINGS AND ERRORS (IF ANY) FOR PROBLEM    1
 (WARNING  2) NM-TRAN INFERS THAT THE DATA ARE POPULATION.
 (WARNING  66) WITH "LAPLACIAN" AND "INTERACTION", "NUMERICAL" AND "SLOW"
 ARE ALSO REQUIRED ON $ESTIM RECORD. NM-TRAN HAS SUPPLIED THESE OPTIONS.
Note: Analytical 2nd Derivatives are constructed in FSUBS but are never used.
      You may insert $ABBR DERIV2=NO after the first $PROB to save FSUBS construction and compilation time

1NONLINEAR MIXED EFFECTS MODEL PROGRAM (NONMEM) VERSION 7.6.0 (nm760)
 ORIGINALLY DEVELOPED BY STUART BEAL, LEWIS SHEINER, AND ALISON BOECKMANN
 CURRENT DEVELOPERS ARE ROBERT BAUER, ICON DEVELOPMENT SOLUTIONS,
 AND ALISON BOECKMANN. IMPLEMENTATION, EFFICIENCY, AND STANDARDIZATION
 PERFORMED BY NOUS INFOSYSTEMS.
 PROBLEM NO.:         1
 Schnider
 TOT. NO. OF OBS RECS:     1006
 TOT. NO. OF INDIVIDUALS:       24
 GENERAL NONLINEAR KINETICS MODEL WITH STIFF/NONSTIFF EQUATIONS (LSODA, ADVAN13)
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 #TBLN:      1
 #METH: Laplacian Conditional Estimation with Interaction
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
 #TERM:
0MINIMIZATION TERMINATED
 DUE TO ROUNDING ERRORS (ERROR=134)
 NO. OF FUNCTION EVALUATIONS USED:       91
 NO. OF SIG. DIGITS IN FINAL EST.:  2.2
 ADDITIONAL PROBLEMS OCCURRED WITH THE MINIMIZATION.
 REGARD THE RESULTS OF THE ESTIMATION STEP CAREFULLY, AND ACCEPT THEM ONLY
 AFTER CHECKING THAT THE COVARIANCE STEP PRODUCES REASONABLE OUTPUT.

 ETABAR IS THE ARITHMETIC MEAN OF THE ETA-ESTIMATES,
 AND THE P-VALUE IS GIVEN FOR THE NULL HYPOTHESIS THAT THE TRUE MEAN IS 0.

 ETABAR:        -1.8335E-02 -2.1842E-01  0.0000E+00 -1.1524E-02  0.0000E+00  0.0000E+00
 SE:             5.5904E-02  4.6891E-02  0.0000E+00  2.8136E-02  0.0000E+00  0.0000E+00
 N:                      24          24          24          24          24          24

 P VAL.:         7.4294E-01  3.1952E-06  1.0000E+00  6.8210E-01  1.0000E+00  1.0000E+00

 ETASHRINKSD(%)  2.0669E+01  4.2705E-01  0.0000E+00  3.1433E+01  0.0000E+00  0.0000E+00
 ETASHRINKVR(%)  3.7066E+01  8.5228E-01  0.0000E+00  5.2986E+01  0.0000E+00  0.0000E+00
 EBVSHRINKSD(%)  1.7723E+01  1.3988E+01  0.0000E+00  2.1694E+00  0.0000E+00  0.0000E+00
 EBVSHRINKVR(%)  3.2306E+01  2.6019E+01  0.0000E+00  4.2918E+00  0.0000E+00  0.0000E+00
 RELATIVEINF(%)  6.2860E+01  6.9104E+01  0.0000E+00  9.4127E+01  0.0000E+00  0.0000E+00
 EPSSHRINKSD(%)  8.4669E-01
 EPSSHRINKVR(%)  1.6862E+00


 TOTAL DATA POINTS NORMALLY DISTRIBUTED (N):         1006
 N*LOG(2PI) CONSTANT TO OBJECTIVE FUNCTION:    1848.9043288078014
 OBJECTIVE FUNCTION VALUE WITHOUT CONSTANT:   -2871.7469554601803
 OBJECTIVE FUNCTION VALUE WITH CONSTANT:      -1022.8426266523788
 REPORTED OBJECTIVE FUNCTION DOES NOT CONTAIN CONSTANT

 TOTAL EFFECTIVE ETAS (NIND*NETA):                            72


 #TERE:
 Elapsed estimation  time in seconds:    19.05
 Elapsed postprocess time in seconds:     0.00

 ********************                LAPLACIAN CONDITIONAL ESTIMATION WITH INTERACTION               ********************
 #OBJT:**************                       MINIMUM VALUE OF OBJECTIVE FUNCTION                      ********************
 #OBJV:********************************************         -2871.747       *********************************************

 ********************                LAPLACIAN CONDITIONAL ESTIMATION WITH INTERACTION               ********************
 ********************                             FINAL PARAMETER ESTIMATE                           ********************

 THETA - VECTOR OF FIXED EFFECTS PARAMETERS   *********
         TH 1      TH 2      TH 3      TH 4      TH 5      TH 6      TH 7      TH 8
         5.56E+00  1.92E+01  2.06E+02  1.98E+00  1.06E+00  1.00E+00  2.53E-01  1.00E-05

 OMEGA - COV MATRIX FOR RANDOM EFFECTS - ETAS  ********
         ETA1      ETA2      ETA3      ETA4      ETA5      ETA6
 ETA1
+        1.20E-01
 ETA2
+        0.00E+00  1.01E-01
 ETA3
+        0.00E+00  0.00E+00  0.00E+00
 ETA4
+        0.00E+00  0.00E+00  0.00E+00  4.07E-02
 ETA5
+        0.00E+00  0.00E+00  0.00E+00  0.00E+00  0.00E+00
 ETA6
+        0.00E+00  0.00E+00  0.00E+00  0.00E+00  0.00E+00  0.00E+00

 SIGMA - COV MATRIX FOR RANDOM EFFECTS - EPSILONS  ****
         EPS1
 EPS1
+        1.00E+00

 OMEGA - CORR MATRIX FOR RANDOM EFFECTS - ETAS  *******
         ETA1      ETA2      ETA3      ETA4      ETA5      ETA6
 ETA1
+        3.46E-01
 ETA2
+        0.00E+00  3.18E-01
 ETA3
+        0.00E+00  0.00E+00  0.00E+00
 ETA4
+        0.00E+00  0.00E+00  0.00E+00  2.02E-01
 ETA5
+        0.00E+00  0.00E+00  0.00E+00  0.00E+00  0.00E+00
 ETA6
+        0.00E+00  0.00E+00  0.00E+00  0.00E+00  0.00E+00  0.00E+00

 SIGMA - CORR MATRIX FOR RANDOM EFFECTS - EPSILONS  ***
         EPS1
 EPS1
+        1.00E+00
 Elapsed finaloutput time in seconds:     0.01
 #CPUT: Total CPU Time in Seconds,      103.740
